f(x) := x^2 - x
integral(f(x), x) → x^3/3 - x^2/2
integral(cos(5*x), x) → sin(5*x)/5
integral(5*sin(x)/e^15, x) → -5*e^-15*cos(x)
d/dx((3*x^2) + sin(x - 5)) → 6*x + cos(x - 5)
d/dx((ln(x - 2)*x^2) - cos(x^2 - 3) + sin(x - 5)) → cos(x - 5) + x^2/(x - 2) + 2*x*ln(x - 2) + 2*x*sin(x^2 - 3)
d/dx(15*x^4 + 3*log(x - 4) - 2*sin(x - 4)) → 60*x^3 - 2*cos(x - 4) + 3/(ln(10)*(x - 4))
A := [3, 4, 7; 1, 2, 9; 5, 8, 3]
B := [1, 2, 0; 5, 6, 9; 7, 1, 4]
C := [1, 1; 0, 6; 7, 8]
D := [7; 3; 4]
diag(D) = [7, 0, 0; 0, 3, 0; 0, 0, 4]
augment(A, C) → [3, 4, 7, 1, 1; 1, 2, 9, 0, 6; 5, 8, 3, 7, 8]
stack(A, B) = [3, 4, 7; 1, 2, 9; 5, 8, 3; 1, 2, 0; 5, 6, 9; 7, 1, 4]
X1 := lsolve(A, D)
X := A^-1*D
X = [5.5; -3.09091; 0.409091]
X1 = [5.5; -3.09091; 0.409091]
H := A*X1 - D
N := A*X - D
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f(x, y) := x^2 + 7*x + 6*x*y + 3*y + 2*y^3
# [component: inputs f]
x_0 := sqrt(9)
y_0 - sqrt(8)
f(x, y) := x^2/3 - y^2/4 - 1
# [component: inputs f]
